*Heading
** Job name: 2c2p-C2H-bolt Model name: 2ch2p-C2H-bolt
** Generated by: Abaqus/CAE 2023
*Preprint, echo=NO, model=NO, history=NO, contact=NO
**
** PARTS
**
*Part, name=C-Ch-Double
*Node
      1, 1.705418, 100.000000, 732.500000
      2, 1.713875, 100.000000, 757.500000
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*Element, type=S4R
 1,   95,   96, 3517, 3521
 2, 3521, 3517, 3518, 3520
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*Element, type=S3
8829, 11619, 11629, 11628
8945, 11675, 11677, 11676
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*Nset, nset=_PickedSet28, internal, generate
     1,  37711,      1
*Elset, elset=_PickedSet28, internal, generate
     1,  37352,      1
** Section: plt-46
*Shell Section, elset=_PickedSet28, material=HT780, offset=SNEG
4.6, 5
*End Part
**
*Part, name=load-plate
*Node
      1,         249.,          40.,           0.
      2,         249.,          40.,          20.
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*Element, type=C3D8R
  1,  72, 339, 567, 179,   1,  13, 171,  22
  2, 339,  93, 259, 567,  13,   2,  14, 171
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*Nset, nset=_PickedSet3, internal, generate
   1,  726,    1
*Elset, elset=_PickedSet3, internal, generate
   1,  420,    1
** Section: elastic
*Solid Section, elset=_PickedSet3, material=Elastic
,
*End Part
**
*Part, name=patch-plate
*Node
      1,        257.5,          90.,           0.
      2,        232.5,          90.,           0.
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*Element, type=S4R
1, 42,  2, 43, 41
2, 40, 41, 43,  1
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*Element, type=S3
11, 424,  57, 387
12, 416, 386, 407
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*Nset, nset=_PickedSet15, internal, generate
    1,  1508,     1
*Elset, elset=_PickedSet15, internal, generate
    1,  1479,     1
** Section: patch-plate
*Shell Section, elset=_PickedSet15, material=timber
9., 5
*End Part
**
*Part, name=stiffness
*Node
      1,           0.,         195.,           0.
      2,         108.,         195.,           0.
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*Element, type=S8R
  1,   1,   9, 115,  65, 505, 506, 507, 508
  2,   9,  10, 116, 115, 509, 510, 511, 506
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*Nset, nset=_PickedSet2, internal, generate
    1,  1458,     1
*Elset, elset=_PickedSet2, internal, generate
   1,  451,    1
** Section: plt-46
*Shell Section, elset=_PickedSet2, material=HT780
4.6, 5
*End Part
**
*Part, name=sup-plt
*Node
      1,         150.,         200.,           0.
      2,          75.,         200.,           0.
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*Element, type=S4R
 1,   1,  16,  94,  29
 2,  16,  17,  95,  94
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*Nset, nset=_PickedSet10, internal, generate
   1,  189,    1
*Elset, elset=_PickedSet10, internal, generate
   1,  160,    1
** Section: sup-plate
*Shell Section, elset=_PickedSet10, material=Elastic
9., 5
*End Part
**
**
** ASSEMBLY
**
*Assembly, name=Assembly
**
*Instance, name=C-Ch-Double-1, part=C-Ch-Double
*End Instance
**
*Instance, name=stiffness-1, part=stiffness
         4.6,           5.,        1000.
*End Instance
**
*Instance, name=stiffness-1-lin-2-1, part=stiffness
         4.6,           5.,         500.
*End Instance
**
*Instance, name=stiffness-1-lin-2-1-1, part=stiffness
         4.6,           5.,        1500.
*End Instance
**
*Instance, name=load-plate-1, part=load-plate
       -129.,         420.,         960.
       -129.,         420.,         960., -127.999999987312,         420.,         960., 89.9999992730282
*End Instance
**
*Instance, name=C-Ch-Double-1-lin-2-1, part=C-Ch-Double
-8.99999999999989,           0.,        2000.
-8.99999999999989,           0.,        2000., -8.99999999999989,           1.,        2000.,         180.
*End Instance
**
*Instance, name=stiffness-1-lin-2-1-2, part=stiffness
       -13.6,           5.,        1000.
       -13.6,           5.,        1000.,        -13.6,           6.,        1000.,         180.
*End Instance
**
*Instance, name=stiffness-1-lin-2-1-lin-2-1, part=stiffness
-13.5999999999999,           5.,        1500.
-13.5999999999999,           5.,        1500., -13.5999999999999,           6.,        1500.,         180.
*End Instance
**
*Instance, name=stiffness-1-lin-2-1-1-lin-2-1, part=stiffness
-13.6000000000001,           5.,         500.
-13.6000000000001,           5.,         500., -13.6000000000001,           6.,         500.,         180.
*End Instance
**
*Instance, name=patch-plate-1, part=patch-plate
-4.50000000000006,          10.,         500.
-4.50000000000006,          10.,         500., -4.50000000000006, 8.99999998731195,         500., 89.9999992730282
*End Instance
**
*Instance, name=sup-plt-1, part=sup-plt
        -4.5,           0.,        2030.
        -4.5,           0.,        2030.,         -4.5, 1.00000001268805,        2030., 89.9999992730282
*End Instance
**
*Instance, name=sup-plt-2, part=sup-plt
        -4.5,           0.,         120.
        -4.5,           0.,         120.,         -4.5, 1.00000001268805,         120., 89.9999992730282
*End Instance
**
*Node
      1,         -4.5,         200.,        2100.
*Node
      2,         -4.5,         200.,        -100.
*Node
      3,         -4.5,         450.,        1000.
*Nset, nset=Set-20, instance=sup-plt-1
 12,
*Nset, nset=bflg-c, instance=C-Ch-Double-1
   75,   76, 2432, 2433, 2434, 2435
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*Elset, elset=bflg-c, instance=C-Ch-Double-1
 24674, 24675, 24676, 24677, 24678, 24679
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*Nset, nset=cch-supbolt, instance=C-Ch-Double-1
 40, 41, 42, 55, 56, 57
*Nset, nset=cch-supbolt, instance=C-Ch-Double-1-lin-2-1
 40, 41, 42, 55, 56, 57
*Nset, nset=plate-lower-set, instance=load-plate-1
   2,   3,   5,   6,  10,  12
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*Elset, elset=plate-lower-set, instance=load-plate-1
   2,   4,   6,   8,  10,  12
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*Nset, nset=sup-plt-bolt, instance=sup-plt-1
 2, 3, 8
*Nset, nset=sup-plt-bolt, instance=sup-plt-2
 2, 3, 8
*Nset, nset=sup-point, instance=sup-plt-1
 12,
*Nset, nset=sup-point, instance=sup-plt-2
 12,
*Nset, nset=_PickedSet10, internal, instance=stiffness-1
    1,    3,    4,    5,    6,    7
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*Nset, nset=_PickedSet10, internal, instance=stiffness-1-lin-2-1
    1,    3,    4,    5,    6,    7
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*Nset, nset=_PickedSet10, internal, instance=stiffness-1-lin-2-1-1
    1,    3,    4,    5,    6,    7
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*Elset, elset=_PickedSet10, internal, instance=stiffness-1
   1,  12,  23,  34,  45,  56
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*Elset, elset=_PickedSet10, internal, instance=stiffness-1-lin-2-1
   1,  12,  23,  34,  45,  56
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*Elset, elset=_PickedSet10, internal, instance=stiffness-1-lin-2-1-1
   1,  12,  23,  34,  45,  56
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*Nset, nset=_PickedSet11, internal, instance=C-Ch-Double-1
    7,    8,    9,   10,   17,   18
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*Elset, elset=_PickedSet11, internal, instance=C-Ch-Double-1
  1354,  1372,  1390,  1408,  1426,  1444
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*Nset, nset=_PickedSet24, internal
 3,
*Nset, nset=_PickedSet26, internal
 3,
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*Nset, nset=_PickedSet139, internal, instance=load-plate-1
  1,  8, 53, 54, 55, 56
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*Nset, nset=_PickedSet153, internal, instance=C-Ch-Double-1-lin-2-1
    7,    8,    9,   10,   17,   18
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*Elset, elset=_PickedSet153, internal, instance=C-Ch-Double-1-lin-2-1
  1354,  1372,  1390,  1408,  1426,  1444
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*Nset, nset=_PickedSet154, internal, instance=stiffness-1-lin-2-1-2
    1,    3,    4,    5,    6,    7
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*Nset, nset=_PickedSet154, internal, instance=stiffness-1-lin-2-1-lin-2-1
    1,    3,    4,    5,    6,    7
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*Nset, nset=_PickedSet154, internal, instance=stiffness-1-lin-2-1-1-lin-2-1
    1,    3,    4,    5,    6,    7
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*Elset, elset=_Plt1-O_SNEG, internal, instance=C-Ch-Double-1
    87,    88,    89,    90,    91,    92
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*Surface, type=ELEMENT, name=Plt1-O
_Plt1-O_SNEG, SNEG
*Elset, elset=_Plt2-O_SNEG, internal, instance=C-Ch-Double-1-lin-2-1
    87,    88,    89,    90,    91,    92
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*Surface, type=ELEMENT, name=Plt2-O
_Plt2-O_SNEG, SNEG
*Elset, elset=_hole-ch_SNEG, internal, instance=C-Ch-Double-1
     1,     2,     3,     4,     5,     6
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*Elset, elset=_hole-ch_SNEG, internal, instance=C-Ch-Double-1-lin-2-1
     1,     2,     3,     4,     5,     6
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*Surface, type=ELEMENT, name=hole-ch
_hole-ch_SNEG, SNEG
*Elset, elset=_hole-ch1_SNEG, internal, instance=C-Ch-Double-1
     1,     2,     3,     4,     5,     6
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*Surface, type=ELEMENT, name=hole-ch1
_hole-ch1_SNEG, SNEG
*Elset, elset=_hole-ch2_SNEG, internal, instance=C-Ch-Double-1-lin-2-1
     1,     2,     3,     4,     5,     6
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*Surface, type=ELEMENT, name=hole-ch2
_hole-ch2_SNEG, SNEG
*Elset, elset=_hole-pplt-ch_, internal, instance=patch-plate-1
   1,   2,   3,   4,   5,   6
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*Surface, type=ELEMENT, name=hole-pplt-ch
_hole-pplt-ch_,
*Elset, elset=_plate-lower_S4, internal, instance=load-plate-1, generate
   2,  210,    2
*Elset, elset=_plate-lower_S6, internal, instance=load-plate-1, generate
 211,  419,    2
*Surface, type=ELEMENT, name=plate-lower
_plate-lower_S4, S4
_plate-lower_S6, S6
*Elset, elset=_plate-upper_S4, internal, instance=load-plate-1, generate
 212,  420,    2
*Elset, elset=_plate-upper_S6, internal, instance=load-plate-1, generate
   1,  209,    2
*Surface, type=ELEMENT, name=plate-upper
_plate-upper_S4, S4
_plate-upper_S6, S6
*Elset, elset=__PickedSurf123_S4, internal, instance=load-plate-1, generate
   2,  210,    2
*Elset, elset=__PickedSurf123_S6, internal, instance=load-plate-1, generate
 211,  419,    2
*Surface, type=ELEMENT, name=_PickedSurf123, internal
__PickedSurf123_S4, S4
__PickedSurf123_S6, S6
*Elset, elset=__PickedSurf124_SNEG, internal, instance=C-Ch-Double-1
 26678, 26679, 26680, 26681, 26682, 26683
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*Surface, type=ELEMENT, name=_PickedSurf124, internal
__PickedSurf124_SNEG, SNEG
*Elset, elset=__PickedSurf152_SNEG, internal, instance=C-Ch-Double-1
 28054, 28055, 28056, 28057, 28058, 28059
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*Elset, elset=__PickedSurf152_SNEG, internal, instance=C-Ch-Double-1-lin-2-1
 28054, 28055, 28056, 28057, 28058, 28059
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*Surface, type=ELEMENT, name=_PickedSurf152, internal
__PickedSurf152_SNEG, SNEG
*Surface, type=NODE, name=_PickedSet139_CNS_, internal
_PickedSet139, 1.
*Surface, type=NODE, name=_PickedSet11_CNS_, internal
_PickedSet11, 1.
*Surface, type=NODE, name=_PickedSet10_CNS_, internal
_PickedSet10, 1.
*Surface, type=NODE, name=_PickedSet153_CNS_, internal
_PickedSet153, 1.
*Surface, type=NODE, name=_PickedSet154_CNS_, internal
_PickedSet154, 1.
*Surface, type=NODE, name=sup-plt-bolt_CNS_, internal
sup-plt-bolt, 1.
*Surface, type=NODE, name=cch-supbolt_CNS_, internal
cch-supbolt, 1.
** Constraint: RP-load
*Coupling, constraint name=RP-load, ref node=_PickedSet26, surface=_PickedSet139_CNS_
*Kinematic
** Constraint: ch1-pplt-ch2
*Tie, name=ch1-pplt-ch2, adjust=no, position tolerance=8.6
hole-ch, hole-pplt-ch
** Constraint: plate-tflg
*Tie, name=plate-tflg, adjust=no, position tolerance=0.1
plate-lower, _PickedSurf152
** Constraint: stff-cch
*Tie, name=stff-cch, adjust=no, position tolerance=5.02
_PickedSet10_CNS_, _PickedSet11_CNS_
** Constraint: stff-cch-2
*Tie, name=stff-cch-2, adjust=no, position tolerance=5.02
_PickedSet154_CNS_, _PickedSet153_CNS_
** Constraint: sup-plt-bolt
*Tie, name=sup-plt-bolt, adjust=no, position tolerance=8.6
cch-supbolt_CNS_, sup-plt-bolt_CNS_
**
** INTEGRATED OUTPUT SECTIONS
**
*Integrated Output Section, name=load, surface=plate-lower, project orientation=NO
*End Assembly
**
** MATERIALS
**
*Material, name=Elastic
*Density
 7.85e-09,
*Elastic
205000., 0.3
*Material, name=HT780
*Density
 7.85e-09,
*Elastic
205000., 0.3
*Plastic
    780.,         0.
 777.325, 0.00104294
  778.35, 0.00154157
   780.4, 0.00253808
  782.45,  0.0035336
   784.5, 0.00452813
  786.55, 0.00552167
   788.6, 0.00651423
  790.65,  0.0075058
   792.7, 0.00849639
   813.2,  0.0183487
   833.7,  0.0281049
 844.975,  0.0334305
    845.,         1.
*Material, name=timber
*Density
 7e-10,
*Elastic
120000., 0.4
**
** INTERACTION PROPERTIES
**
*Surface Interaction, name=GC
1.,
*Friction, slip tolerance=0.005
 0.2,
*Surface Behavior, pressure-overclosure=HARD
**
** BOUNDARY CONDITIONS
**
** Name: Sup-plt Type: Symmetry/Antisymmetry/Encastre
*Boundary
sup-point, ENCASTRE
** ----------------------------------------------------------------
**
** STEP: Step-1
**
*Step, name=Step-1, nlgeom=YES
*Static, stabilize=0.0002, allsdtol=0.05, continue=NO
0.1, 1., 1e-08, 0.2
**
** BOUNDARY CONDITIONS
**
** Name: load Type: Displacement/Rotation
*Boundary
_PickedSet24, 1, 1
_PickedSet24, 2, 2, -5.
_PickedSet24, 3, 3
**
** LOADS
**
** Name: DL   Type: Gravity
*Dload
, GRAV, 9.8, 0., -1., 0.
**
** OUTPUT REQUESTS
**
*Restart, write, frequency=0
**
** FIELD OUTPUT: F-Output-1
**
*Output, field
*Node Output
RF, RT, U, UR
*Element Output, directions=YES
MISES, PEEQ, S
**
** HISTORY OUTPUT: load-int
**
*Output, history
*Integrated Output, section=load
SOF,
*End Step
